# МИНИСТЕРСТВО НАУКИ И ВЫСШЕГО ОБРАЗОВАНИЯ РОССИЙСКОЙ ФЕДЕРАЦИИ
# Федеральное государственное автономное образовательное учреждение высшего образования
# «САНКТ-ПЕТЕРБУРГСКИЙ ГОСУДАРСТВЕННЫЙ УНИВЕРСИТЕТ АЭРОКОСМИЧЕСКОГО ПРИБОРОСТРОЕНИЯ»
#
# КАФЕДРА 23
#
# КУРСОВАЯ РАБОТА
# ЗАЩИЩЕНА С ОЦЕНКОЙ
# РУКОВОДИТЕЛЬ
#
# Канд. техн. наук, доцент  О. Л. Балышева
#
# ОТЧЁТ О КУРСОВОЙ РАБОТЕ
# «ИССЛЕДОВАНИЕ ПРОХОЖДЕНИЯ СИГНАЛА ЧЕРЕЗ ЛИНЕЙНУЮ ЦЕПЬ»
#
# По дисциплине: РАДИОТЕХНИЧЕСКИЕ ЦЕПИ И СИГНАЛЫ
#
# РАБОТУ ВЫПОЛНИЛ
#
# СТУДЕНТ ГР. № 2311  А. С. Матюшанов
#
# Санкт-Петербург 2025
# 1 ЗАДАНИЕ НА КУРСОВУЮ РАБОТУ И ВАРИАНТЫ
# Вариант сигнала и линейной цепи:
# 1) Исходный сигнал варианта 1:
#
# 2) Линейная цепь варианта 17:
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# Задание на курсовую работу:
# Заданы:
# – Функция s(t), определенная на интервале времени
# –T/2< t <T/2 (исходный сигнал варианта 1)
# – Принципиальная схема радиотехнической цепи с номиналами элементов (линейная цепь варианта 17)
# Используя систему MathCAD требуется:
# 1. Построить график исходной функции s(t), задавая необходимый диапазон значений ее аргумента и выбрав удобный масштаб.
# 2. Образовать периодический сигнал путем повторения функции s(t) с периодом T. Вычислить амплитудный и фазовый спектры этого сигнала. Построить спектральные диаграммы. Найти эффективную ширину спектра (по выбранному уровню). Вычислить какая часть средней за период мощности сигнала содержится в эффективной части спектра.
#
# 3. Синтезировать периодический сигнал по эффективной части его спектра. Построить на одном графике исходный и синтезированный сигналы. Определить погрешность синтеза. Показать возможность уменьшения этой погрешности.
# 4. Образовать непериодический сигнал, приняв его равным s(t) на интервале –T/2<t<T/2, и равным нулю за пределами этого интервала. Вычислить амплитудный и фазовый спектры непериодического сигнала. Построить спектральные диаграммы. Найти ширину эффективной части спектра (по выбранному уровню). Сравнить спектры периодического и непериодического сигналов (по форме огибающей спектральной функции, по ширине эффективной части, по размерности).
# 5. Определить амплитудно-частотную, фазочастотную характеристики цепи. Построить графики характеристик, выбрав удобные масштабы координат. Найти ширину полосы пропускания цепи. Сравнить частотные диапазоны полосы пропускания цепи и активной части спектра сигнала.
# 6. Используя спектральный метод анализа, вычислить напряжение на выходе цепи при условии, что входное напряжение является периодическим сигналом (п. 2 задания). Сравнить сигналы на входе и выходе цепи и сделать выводы о причинах искажений.
# 2 ВЫПОЛНЕНИЕ РАБОТЫ
# 1. Построить график исходной функции s(t), задавая необходимый диапазон значений ее аргумента и выбрав удобный масштаб.
# Исходные данные:
E := 2
ti := 20*10^-6
T := 100*10^-6
s(t) :=
    E if -ti < t < 0
    (-E) if 0 < t < ti
    0 if t < -ti
    0 if t > ti
# Построение графика исходной функции:
t := -T/2, -T/2 + ti/200 .. T/2
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# 2. Образовать периодический сигнал путем повторения функции s(t) с периодом T. Вычислить амплитудный и фазовый спектры этого сигнала. Построить спектральные диаграммы. Найти эффективную ширину спектра (по выбранному уровню). Вычислить какая часть средней за период мощности сигнала содержится в эффективной части спектра.
# Образование периодического сигнала:
t := -2.5*T, -2.5*T + ti/200 .. 2.5*T
sp(t) := sum(s(t - k*T), k = -2 .. 2)
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# Расчёт амплитудного и фазового спектров периодического нечётного сигнала:
N := 24
n := 0 .. N
f[n] := n/T
b[n] := 4/T*integral(sp(t)*sin(2*π*f[n]*t), t = 0 .. 0.5*T)
A[n] := |b[n]|
A[0] := 0
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# Нахождение эффективной ширины спектра:
4/T = 40000
# Эффективная ширина спектра составляет 40 кГц (4 гармоники по уровню 0,05)
# Номер последней гармоники: Na = 4
ϕ[n] := if(b[n] > 0, -0.5*π, 0.5*π)
Na := 4
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# Средняя за период мощность периодического сигнала:
P := 1/T*integral(sp(t)^2, t = -0.5*T .. 0.5*T) = 1.6
P = 1.6  # Вт
# Мощность, содержащаяся в эффективной части спектра:
Pa := A[0]^2 + sum(0.5*A[n]^2, n = 1 .. Na) = 1.3691
Pa = 1.3691  # Вт
# Часть средней за период мощности, которая содержится в эффективной части спектра:
Pa/P*100 = 85.5689
# В эффективной части спектра содержится 85.6% части средний за период мощности.
# 3. Синтезировать периодический сигнал по эффективной части его спектра. Построить на одном графике исходный и синтезированный сигналы. Определить погрешность синтеза. Показать возможность уменьшения этой погрешности.
Na := 4
ss(t) := A[0] + sum(A[n]*cos(2*π*f[n]*t + ϕ[n]), n = 1 .. Na)
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# Определение среднеквадратической погрешности синтеза:
ε := 1/T*integral((sp(t) - ss(t))^2, t = -0.5*T .. 0.5*T)
ε/P = 0.144326
# Погрешность при Na = 4 составляет 14.4%, при Na = 8 составляет 7.8%
#
# Вывод: возможность уменьшения погрешности синтезированного сигнала заключается в увеличении количества гармоник в эффективной части спектра сигнала.
# 4. Образовать непериодический сигнал, приняв его равным s(t) на интервале –T/2<t<T/2, и равным нулю за пределами этого интервала. Вычислить амплитудный и фазовый спектры непериодического сигнала. Построить спектральные диаграммы. Найти ширину эффективной части спектра (по выбранному уровню). Сравнить спектры периодического и непериодического сигналов (по форме огибающей спектральной функции, по ширине эффективной части, по размерности).
# Образование непериодического сигнала:
snp(t) :=
    s(t) if -T/2 < t < T/2
    0 otherwise
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# Расчёт амплитудного и фазового спектров непериодического нечётного сигнала:
Fm := 2*f[Na]
df := 0.01*Fm
fs := 0, df .. 3*Fm
bs(fs) := 2*integral(snp(t)*sin(2*π*fs*t), t = 0 .. 0.5*T)
S(fs) := |bs(fs)|
ϕs(fs) := if(bs(fs) > 0, -0.5*π, 0.5*π)
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# Нахождение ширины эффективной части спектра (по выбранному уровню):
# Эффективная ширина спектра составляет 40 кГц (по уровню 0.05)
# Сравнение спектров периодического и непериодического сигналов (по форме огибающей спектральной функции, по ширине эффективной части, по размерности):
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# Сравнение:
# 1) АСД периодического сигнала - дискретная, а АСД непериодического сигнала - непрерывная;
# 2) Спектр непериодического сигнала совпадает с огибающей спектра периодического сигнала;
# 3) У непериодического сигнала эффективная ширина спектра как у периодического сигнала (4⋅10^4 или 40 кГц);
# 4) Cпектральная функция непериодического сигнала, в отличие от спектральной функции периодического сигнала, является функцией непрерывного аргумента (частоты ω = 2πf) и представляет собой спектральную плотность, имеющую размерность единицы амплитуды/Гц, то есть Вольт/Гц.
# 5. Определить амплитудно-частотную, фазочастотную характеристики цепи. Построить графики характеристик, выбрав удобные масштабы координат. Найти ширину полосы пропускания цепи. Сравнить частотные диапазоны полосы пропускания цепи и активной части спектра сигнала.
R := 5*10^3
C1 := 3*10^-9
C2 := 3*10^-9
Z2(fs) := 1/(1i*2*π*fs*(C1 + C2))
# - Комплексное сопротивление
# параллельной ветви схемы
Z1(fs) := R  # - Комплексное сопротивление последовательной ветви схемы
Kk(fs) := Z2(fs)/(Z1(fs) + Z2(fs))  # - Комплексное сопротивление схемы
# Расчёт амплитудно-частотной и фазо-частотной характеристик цепи чётного сигнала:
K(fs) := |Kk(fs)|
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ϕk(fs) := if(K(fs) ≠ 0, arg(Kk(fs)), 0)
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# Определение полосы пропускания цепи и сравнение полосы пропускания с активной частью спектра сигнала:
# Полоса пропускания составляет 5.53 кГц, что соответствует 13.825% активной части спектра сигнала (40 кГц).
# 6. Используя спектральный метод анализа, вычислить напряжение на выходе цепи при условии, что входное напряжение является периодическим сигналом (п. 2 задания). Сравнить сигналы на входе и выходе цепи и сделать выводы о причинах искажений.
Na := 4
N := 24
s(t) :=
    E if -ti < t < 0
    (-E) if 0 < t < ti
    0 if t < -ti
    0 if t > ti
t := -2.5*T, -2.5*T + ti/200 .. 2.5*T
sp(t) := sum(s(t - k*T), k = -2 .. 2)
n := 1 .. N
b[n] := 4/T*integral(sp(t)*sin(2*π*f[n]*t), t = 0 .. 0.5*T)
A[n] := |b[n]|
A[0] := 0
ϕ[n] := if(b[n] > 0, -0.5*π, 0.5*π)
f[n] := n/T
Z1[n] := R
Z2[n] := 1/(1i*2*π*f[n]*(C1 + C2))
Kk[n] := Z2[n]/(Z1[n] + Z2[n])
K[n] := |Kk[n]|
ϕk[n] := if(K[n] ≠ 0, arg(Kk[n]), 0)
s2(t) := A[0]*K[0] + sum(A[n]*K[n]*cos(2*π*f[n]*t + ϕ[n] + ϕk[n]), n = 1 .. 4)
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# Сравнение сигналов на входе и выходе цепи и выводы о причинах искажений:
# Проведенное исследование прохождения сигнала через линейную цепь, содержащую резистор R и два конденсатора C1 и C2, позволило сделать следующие выводы:
# 1) Сравнение сигналов на входе и выходе цепи показало, что выходной сигнал кардинально отличается от входного - прямоугольные импульсы преобразовались в сглаженные колоколообразные всплески значительно меньшей амплитуды;
# 2) Анализ амплитудно - частотной характеристики цепи выявил, что данная RC - цепь является фильтром нижних частот с полосой пропускания 5.53 кГц. Это означает, что гармоники входного сигнала, находящиеся выше этой частоты, существенно ослабляются;
#
# 3) Спектральный анализ входного сигнала показал, что его эффективная ширина спектра составляет 40 кГц, что примерно в 7.24 раза превышает полосу пропускания цепи. Именно этим несоответствием частотных диапазонов объясняются наблюдаемые искажения формы выходного сигнала;
# 4) Ёмкостной характер элементов цепи блокирует постоянную составляющую и вызывает ослабление высших гармоник сигнала, что приводит к полному исчезновению резких фронтов и формированию плавных импульсов на выходе. В отличие от катушек индуктивности, которые лишь ослабляют постоянную составляющую, конденсаторы полностью её блокируют;
# 5) Теоретические расчеты комплексного коэффициента передачи цепи и последующее моделирование в MathCAD полностью подтвердили экспериментальные наблюдения и соответствуют фундаментальным принципам работы RC - цепей.
# Таким образом, основные искажения сигнала при прохождении через данную цепь обусловлены ограниченной полосой пропускания фильтра нижних частот, которая существенно уже эффективной ширины спектра входного сигнала, а также блокировкой постоянной составляющей ёмкостными элементами цепи.
